// SBML level 2 version 4

model New_Model()

  // Compartments:
  compartment compartment = 1;

  // Species:
  species M1 in compartment = 2;
  species M2 in compartment = 0;
  species M3 in compartment = 0;
  species M4 in compartment = 0;
  species M5 in compartment = 0;
  species M6 in compartment = 0;
  species M7 in compartment = 0;
  species M8 in compartment = 0;
  species M9 in compartment = 0;
  species M10 in compartment = 0;
  species M11 in compartment = 0;
  species ATP in compartment = 0.1;
  species ADP in compartment = 1;
  species H2O in compartment = 1;
  species PH in compartment = 1;
  species NADP in compartment = 1;
  species NADPH in compartment = 1;
  species H in compartment = 1;
  species RF in compartment = 0;
  species OF in compartment = 1;

  // Reactions:
  Glucose1: ATP + M1 => ADP + M2; compartment*Glucose1_k1*ATP*M1;
    Glucose1_k1 = 0.717;
  Glucose2: M2 => M3; compartment*Glucose2_k1*M2;
    Glucose2_k1 = 0.5;
  Glucose3: ATP + M3 => ADP + M4; compartment*Glucose3_k1*ATP*M3;
    Glucose3_k1 = 0.45;
  Glucose4: M4 => M5 + M6; compartment*Glucose4_k1*M4;
    Glucose4_k1 = 0.77;
  Glucose5: M5 => M6; compartment*Glucose5_k1*M5;
    Glucose5_k1 = 0.35;
  Glucose7: M6 + PH + NADP => M7 + NADPH + H; compartment*Glucose7_k1*M6*PH*NADP;
    Glucose7_k1 = 0.6;
  Glucose8: ADP + M7 => 2 ATP + M8; compartment*Glucose8_k1*ADP*M7;
    Glucose8_k1 = 0.69;
  Glucose9: M8 => M9; compartment*Glucose9_k1*M8;
    Glucose9_k1 = 0.38;
  Glucose10: M9 => M10 + H2O; compartment*Glucose10_k1*M9;
    Glucose10_k1 = 0.55;
  Glucose11: ADP + M10 => 2 ATP + M11; compartment*Glucose11_k1*ADP*M10;
    Glucose11_k1 = 0.6;

  // Unit definitions:
  unit volume = 1e-3 litre;
  unit substance = 1e-3 mole;
end
