// SBML level 2 version 4

model New_Model()

  // Compartments:
  compartment compartment = 1;

  // Species:
  species C00008 in compartment = 0.00056;
  species C01251 in compartment = 0.001;
  species C02612 in compartment = 0.001;
  species C04272 in compartment = 0.001;
  species C14463 in compartment = 0.001;
  species C06006 in compartment = 0.001;
  species C06010 in compartment = 0.001;
  species C00671 in compartment = 0.001;
  species C00149 in compartment = 0.0017;
  species C04002 in compartment = 0.001;
  species C16254 in compartment = 0.001;
  species C04691 in compartment = 0.001;
  species C02226 in compartment = 0.001;
  species C00322 in compartment = 0.001;
  species C00109 in compartment = 0.001;
  species C00026 in compartment = 0.00044;
  species C00631 in compartment = 0.001;
  species C01179 in compartment = 0.001;
  species C05381 in compartment = 0.001;
  species C00944 in compartment = 0.001;
  species C02637 in compartment = 0.001;
  species C04181 in compartment = 0.001;
  species C00141 in compartment = 0.001;
  species C00197 in compartment = 0.0015;
  species C00236 in compartment = 0.001;
  species C03232 in compartment = 0.001;
  species C00334 in compartment = 0.001;
  species C01061 in compartment = 0.001;
  species C01036 in compartment = 0.001;
  species C01269 in compartment = 0.001;
  species C00033 in compartment = 0.001;
  species C00164 in compartment = 0.001;
  species C00024 in compartment = 0.00061;
  species C05535 in compartment = 0.001;
  species C00984 in compartment = 0.001;
  species C00446 in compartment = 0.001;
  species C00267 in compartment = 0.005;
  species C00668 in compartment = 0.001;
  species C00014 in compartment = 0.001;
  species C00020 in compartment = 0.00028;
  species C00002 in compartment = 0.001077;
  species C05378 in compartment = 0.015;
  species C05345 in compartment = 0.001;
  species C00169 in compartment = 0.001;
  species C00251 in compartment = 0.001;
  species C00417 in compartment = 1.6e-5;
  species C00158 in compartment = 0.002;
  species C00011 in compartment = 0.001;
  species C00010 in compartment = 0.0014;
  species C06032 in compartment = 0.001;
  species C00279 in compartment = 0.001;
  species C00124 in compartment = 0.001;
  species C00103 in compartment = 0.001;
  species C00118 in compartment = 0.001;
  species C00013 in compartment = 0.001;
  species C15973 in compartment = 0.001;
  species C15972 in compartment = 0.001;
  species C00122 in compartment = 0.00012;
  species C00035 in compartment = 0.00068;
  species C00111 in compartment = 0.00037;
  species C00044 in compartment = 0.0049;
  species C00080 in compartment = 0.001;
  species C00001 in compartment = 0.001;
  species C11482 in compartment = 0.001;
  species C00544 in compartment = 0.001;
  species C05662 in compartment = 0.001;
  species C00027 in compartment = 0.001;
  species C00530 in compartment = 0.001;
  species C00104 in compartment = 2.4e-5;
  species C00311 in compartment = 0.001;
  species C00081 in compartment = 0.00021;
  species C00956 in compartment = 0.001;
  species C04076 in compartment = 0.001;
  species C05560 in compartment = 0.001;
  species C00041 in compartment = 0.0026;
  species C00062 in compartment = 0.00057;
  species C00049 in compartment = 0.0042;
  species C00327 in compartment = 0.0014;
  species C00025 in compartment = 0.096;
  species C00407 in compartment = 0.001;
  species C00047 in compartment = 0.00041;
  species C00077 in compartment = 1e-5;
  species C00065 in compartment = 6.8e-5;
  species C00082 in compartment = 2.9e-5;
  species C00183 in compartment = 0.004;
  species C03406 in compartment = 0.001;
  species C00449 in compartment = 0.001;
  species C00003 in compartment = 0.0026;
  species C00004 in compartment = 8.3e-5;
  species C00006 in compartment = 2.1e-6;
  species C00005 in compartment = 0.00012;
  species C01005 in compartment = 0.001;
  species C00009 in compartment = 0.001;
  species C00036 in compartment = 0.001;
  species C05379 in compartment = 0.001;
  species C00139 in compartment = 0.001;
  species C00007 in compartment = 0.001;
  species C00074 in compartment = 0.00018;
  species C00404 in compartment = 0.001;
  species C00022 in compartment = 0.001;
  species C15602 in compartment = 0.001;
  species C00138 in compartment = 0.001;
  species C00493 in compartment = 1.4e-5;
  species C03175 in compartment = 0.001;
  species C00042 in compartment = 0.00057;
  species C00232 in compartment = 0.001;
  species C00091 in compartment = 0.00023;
  species C00068 in compartment = 0.00038;
  species C00052 in compartment = 0.001;
  species C00029 in compartment = 0.0025;
  species C00086 in compartment = 0.001;
  species C00075 in compartment = 0.0083;
  species C15603 in compartment = 0.001;
  species C06007 in compartment = 0.001;
  species C01352 in compartment = 0.001;
  species C00016 in compartment = 0.001;
  species APS in compartment = 0.001;
  species Cbl in compartment = 0.001;
  species GRF2 in compartment = 0.001;
  species INS in compartment = 0.001;
  species CIP4_2 in compartment = 0.001; CIP4_2 is "CIP4/2";
  species Exo70 in compartment = 0.001;
  species TC10 in compartment = 0.001;

  // Reactions:
  R01786: C00002 + C00267 -> C00008 + C00668; compartment*(R01786_k1*C00002*C00267 - R01786_k2*C00008*C00668);
    R01786_k1 = 5; R01786_k2 = 0.8;
  R02740: C00668 -> C05345; compartment*(R02740_k1*C00668 - R02740_k2*C05345);
    R02740_k1 = 1; R02740_k2 = 0.1;
  R04779: C00002 + C05345 -> C00008 + C05378; compartment*(R04779_k1*C00002*C05345 - R04779_k2*C00008*C05378);
    R04779_k1 = 2; R04779_k2 = 0.5;
  R01070: C05378 -> C00111 + C00118; compartment*(R01070_k1*C05378 - R01070_k2*C00111*C00118);
    R01070_k1 = 2; R01070_k2 = 0.1;
  R01015: C00111 -> C00118; compartment*(R01015_k1*C00111 - R01015_k2*C00118);
    R01015_k1 = 5; R01015_k2 = 1;
  R01061: C00118 + C00009 + C00003 -> C00236 + C00004 + C00080; compartment*(R01061_k1*C00118*C00009*C00003 - R01061_k2*C00236*C00004*C00080);
    R01061_k1 = 1; R01061_k2 = 0.1;
  R07159: C00118 + C00001 + 2 C00139 -> C00197 + 2 C00080 + 2 C00138; compartment*(R07159_k1*C00118*C00001*C00139^2 - R07159_k2*C00197*C00080^2*C00138^2);
    R07159_k1 = 5; R07159_k2 = 2;
  R01512: C00008 + C00236 -> C00002 + C00197; compartment*(R01512_k1*C00008*C00236 - R01512_k2*C00002*C00197);
    R01512_k1 = 10; R01512_k2 = 1;
  R01518: C00197 -> C00631; compartment*(R01518_k1*C00197 - R01518_k2*C00631);
    R01518_k1 = 10; R01518_k2 = 1;
  R00658: C00631 -> C00074 + C00001; compartment*(R00658_k1*C00631 - R00658_k2*C00074*C00001);
    R00658_k1 = 1; R00658_k2 = 0.1;
  R00200: C00008 + C00074 -> C00002 + C00022; compartment*(R00200_k1*C00008*C00074 - R00200_k2*C00002*C00022);
    R00200_k1 = 2; R00200_k2 = 1;
  R00351: C00024 + C00001 + C00036 -> C00158 + C00010; compartment*(R00351_k1*C00024*C00001*C00036 - R00351_k2*C00158*C00010);
    R00351_k1 = 1; R00351_k2 = 0.1;
  R01325: C00158 -> C00417 + C00001; compartment*(R01325_k1*C00158 - R01325_k2*C00417*C00001);
    R01325_k1 = 5.3; R01325_k2 = 1;
  R01900: C00417 + C00001 -> C00311; compartment*(R01900_k1*C00417*C00001 - R01900_k2*C00311);
    R01900_k1 = 4; R01900_k2 = 1;
  R01899: C00311 + C00006 -> C05379 + C00005 + C00080; compartment*(R01899_k1*C00311*C00006 - R01899_k2*C05379*C00005*C00080);
    R01899_k1 = 5; R01899_k2 = 1;
  R00268: C05379 -> C00026 + C00011; compartment*(R00268_k1*C05379 - R00268_k2*C00026*C00011);
    R00268_k1 = 1.5; R00268_k2 = 0.5;
  R01197: 2 C00139 + C00026 + C00010 -> 2 C00138 + C00091 + C00011 + 2 C00080; compartment*(R01197_k1*C00139^2*C00026*C00010 - R01197_k2*C00138^2*C00091*C00011*C00080^2);
    R01197_k1 = 5; R01197_k2 = 0.7;
  R02570: C00010 + C16254 -> C00091 + C15973; compartment*(R02570_k1*C00010*C16254 - R02570_k2*C00091*C15973);
    R02570_k1 = 30; R02570_k2 = 10;
  R07618: C15973 + C00003 -> C15972 + C00004 + C00080; compartment*(R07618_k1*C15973*C00003 - R07618_k2*C15972*C00004*C00080);
    R07618_k1 = 4; R07618_k2 = 2;
  R00405: C00008 + C00009 + C00091 -> C00002 + C00042 + C00010; compartment*(R00405_k1*C00008*C00009*C00091 - R00405_k2*C00002*C00042*C00010);
    R00405_k1 = 2; R00405_k2 = 0.4;
  R02164: C15602 + C00042 -> C15603 + C00122; compartment*(R02164_k1*C15602*C00042 - R02164_k2*C15603*C00122);
    R02164_k1 = 1; R02164_k2 = 0.1;
  R01082: C00122 + C00001 -> C00149; compartment*(R01082_k1*C00122*C00001 - R01082_k2*C00149);
    R01082_k1 = 3; R01082_k2 = 0.5;
  R00342: C00149 + C00003 -> C00036 + C00004 + C00080; compartment*(R00342_k1*C00149*C00003 - R00342_k2*C00036*C00004*C00080);
    R00342_k1 = 2; R00342_k2 = 0.2;
  R00209: C00022 + C00010 + C00003 -> C00024 + C00011 + C00004 + C00080; compartment*(R00209_k1*C00022*C00010*C00003 - R00209_k2*C00024*C00011*C00004*C00080);
    R00209_k1 = 3; R00209_k2 = 1;
  R10619: C00124 -> C00984; compartment*(R10619_k1*C00124 - R10619_k2*C00984);
    R10619_k1 = 10; R10619_k2 = 2;
  R01092: C00002 + C00984 -> C00008 + C00446; compartment*(R01092_k1*C00002*C00984 - R01092_k2*C00008*C00446);
    R01092_k1 = 0.5; R01092_k2 = 0.1;
  R00955: C00029 + C00446 -> C00103 + C00052; compartment*(R00955_k1*C00029*C00446 - R00955_k2*C00103*C00052);
    R00955_k1 = 5; R00955_k2 = 1;
  R00291: C00052 -> C00029; compartment*(R00291_k1*C00052 - R00291_k2*C00029);
    R00291_k1 = 3; R00291_k2 = 1;
  R00959: C00668 -> C00103; compartment*(R00959_k1*C00668 - R00959_k2*C00103);
    R00959_k1 = 2; R00959_k2 = 1;
  R00289: C00075 + C00103 -> C00013 + C00029; compartment*(R00289_k1*C00075*C00103 - R00289_k2*C00013*C00029);
    R00289_k1 = 1; R00289_k2 = 0.1;
  R01513: C00197 + C00003 -> C03232 + C00004 + C00080; compartment*(R01513_k1*C00197*C00003 - R01513_k2*C03232*C00004*C00080);
    R01513_k1 = 10; R01513_k2 = 1;
  R04173: C03232 + C00025 -> C01005 + C00026; compartment*(R04173_k1*C03232*C00025 - R04173_k2*C01005*C00026);
    R04173_k1 = 1.5; R04173_k2 = 0.1;
  R00582: C01005 + C00001 -> C00065 + C00009; compartment*(R00582_k1*C01005*C00001 - R00582_k2*C00065*C00009);
    R00582_k1 = 4; R00582_k2 = 0.4;
  R00226: 2 C00022 -> C06010 + C00011; compartment*(R00226_k1*C00022^2 - R00226_k2*C06010*C00011);
    R00226_k1 = 3; R00226_k2 = 1;
  R05071: C06010 -> C04181; compartment*(R05071_k1*C06010 - R05071_k2*C04181);
    R05071_k1 = 3.511; R05071_k2 = 1;
  R04440: C04181 + C00005 + C00080 -> C04272 + C00006; compartment*(R04440_k1*C04181*C00005*C00080 - R04440_k2*C04272*C00006);
    R04440_k1 = 0.00417; R04440_k2 = 0.1;
  R04441: C04272 -> C00141 + C00001; compartment*(R04441_k1*C04272 - R04441_k2*C00141*C00001);
    R04441_k1 = 1; R04441_k2 = 0.1;
  R01214: C00141 + C00025 -> C00183 + C00026; compartment*(R01214_k1*C00141*C00025 - R01214_k2*C00183*C00026);
    R01214_k1 = 5; R01214_k2 = 1;
  R08648: C00022 + C00109 -> C06006 + C00011; compartment*(R08648_k1*C00022*C00109 - R08648_k2*C06006*C00011);
    R08648_k1 = 1; R08648_k2 = 0.1;
  R05069: C06006 -> C14463; compartment*(R05069_k1*C06006 - R05069_k2*C14463);
    R05069_k1 = 1; R05069_k2 = 0.1;
  R05068: C14463 + C00005 + C00080 -> C06007 + C00006; compartment*(R05068_k1*C14463*C00005*C00080 - R05068_k2*C06007*C00006);
    R05068_k1 = 1; R05068_k2 = 0.1;
  R05070: C06007 -> C00671 + C00001; compartment*(R05070_k1*C06007 - R05070_k2*C00671*C00001);
    R05070_k1 = 1; R05070_k2 = 0.1;
  R02199: C00671 + C00025 -> C00407 + C00026; compartment*(R02199_k1*C00671*C00025 - R02199_k2*C00407*C00026);
    R02199_k1 = 5; R02199_k2 = 1;
  R07399: C00024 + C00022 + C00001 -> C02612 + C00010; compartment*(R07399_k1*C00024*C00022*C00001 - R07399_k2*C02612*C00010);
    R07399_k1 = 1; R07399_k2 = 0.1;
  R03896: C02612 -> C02226 + C00001; compartment*(R03896_k1*C02612 - R03896_k2*C02226*C00001);
    R03896_k1 = 1; R03896_k2 = 0.1;
  R03898: C02226 + C00001 -> C06032; compartment*(R03898_k1*C02226*C00001 - R03898_k2*C06032);
    R03898_k1 = 1; R03898_k2 = 0.1;
  R00994: C06032 + C00003 -> C00109 + C00011 + C00004 + C00080; compartment*(R00994_k1*C06032*C00003 - R00994_k2*C00109*C00011*C00004*C00080);
    R00994_k1 = 1; R00994_k2 = 0.1;
  R00271: C00024 + C00001 + C00026 -> C01251 + C00010; compartment*(R00271_k1*C00024*C00001*C00026 - R00271_k2*C01251*C00010);
    R00271_k1 = 1; R00271_k2 = 0.2;
  R03444: C01251 -> C04002 + C00001; compartment*(R03444_k1*C01251 - R03444_k2*C04002*C00001);
    R03444_k1 = 1; R03444_k2 = 0.1;
  R04371: C04002 + C00001 -> C05662; compartment*(R04371_k1*C04002*C00001 - R04371_k2*C05662);
    R04371_k1 = 1; R04371_k2 = 0.1;
  R01934: C05662 + C00003 -> C00322 + C00011 + C00004 + C00080; compartment*(R01934_k1*C05662*C00003 - R01934_k2*C00322*C00011*C00004*C00080);
    R01934_k1 = 1; R01934_k2 = 0.1;
  R01939: C00322 + C00025 -> C00956 + C00026; compartment*(R01939_k1*C00322*C00025 - R01939_k2*C00956*C00026);
    R01939_k1 = 1; R01939_k2 = 0.1;
  R03098: C00956 + C00002 -> C05560 + C00013; compartment*(R03098_k1*C00956*C00002 - R03098_k2*C05560*C00013);
    R03098_k1 = 1; R03098_k2 = 0.1;
  R04863: C05560 + C11482 -> C05535 + C00020; compartment*(R04863_k1*C05560*C11482 - R04863_k2*C05535*C00020);
    R04863_k1 = 1; R04863_k2 = 0.1;
  R04390: C05535 + C00005 + C00080 -> C04076 + C11482 + C00006; compartment*(R04390_k1*C05535*C00005*C00080 - R04390_k2*C04076*C11482*C00006);
    R04390_k1 = 1; R04390_k2 = 0.1;
  R02315: C00025 + C04076 + C00005 + C00080 -> C00449 + C00006 + C00001; compartment*(R02315_k1*C00025*C04076*C00005*C00080 - R02315_k2*C00449*C00006*C00001);
    R02315_k1 = 1; R02315_k2 = 0.1;
  R00715: C00449 + C00003 + C00001 -> C00047 + C00026 + C00004 + C00080; compartment*(R00715_k1*C00449*C00003*C00001 - R00715_k2*C00047*C00026*C00004*C00080);
    R00715_k1 = 1; R00715_k2 = 0.1;
  R09720: C01251 -> C05662; compartment*(R09720_k1*C01251 - R09720_k2*C05662);
    R09720_k1 = 1; R09720_k2 = 0.1;
  R00149: 2 C00002 + C00014 + C00011 + C00001 -> 2 C00008 + C00009 + C00169; compartment*(R00149_k1*C00002^2*C00014*C00011*C00001 - R00149_k2*C00008^2*C00009*C00169);
    R00149_k1 = 1.8; R00149_k2 = 0.1;
  R01398: C00169 + C00077 -> C00009 + C00327; compartment*(R01398_k1*C00169*C00077 - R01398_k2*C00009*C00327);
    R01398_k1 = 8; R01398_k2 = 1;
  R01954: C00002 + C00327 + C00049 -> C00020 + C00013 + C03406; compartment*(R01954_k1*C00002*C00327*C00049 - R01954_k2*C00020*C00013*C03406);
    R01954_k1 = 2; R01954_k2 = 0.5;
  R01086: C03406 -> C00122 + C00062; compartment*(R01086_k1*C03406 - R01086_k2*C00122*C00062);
    R01086_k1 = 7; R01086_k2 = 1;
  R00551: C00062 + C00001 -> C00077 + C00086; compartment*(R00551_k1*C00062*C00001 - R00551_k2*C00077*C00086);
    R00551_k1 = 5; R00551_k2 = 1;
  R01826: C00074 + C00279 + C00001 -> C04691 + C00009; compartment*(R01826_k1*C00074*C00279*C00001 - R01826_k2*C04691*C00009);
    R01826_k1 = 1; R01826_k2 = 0.2;
  R03083: C04691 -> C00944 + C00009; compartment*(R03083_k1*C04691 - R03083_k2*C00944*C00009);
    R03083_k1 = 1; R03083_k2 = 0.1;
  R03084: C00944 -> C02637 + C00001; compartment*(R03084_k1*C00944 - R03084_k2*C02637*C00001);
    R03084_k1 = 1; R03084_k2 = 0.1;
  R02413: C02637 + C00005 + C00080 -> C00493 + C00006; compartment*(R02413_k1*C02637*C00005*C00080 - R02413_k2*C00493*C00006);
    R02413_k1 = 1; R02413_k2 = 0.1;
  R02412: C00002 + C00493 -> C00008 + C03175; compartment*(R02412_k1*C00002*C00493 - R02412_k2*C00008*C03175);
    R02412_k1 = 1; R02412_k2 = 0.1;
  R03460: C00074 + C03175 -> C00009 + C01269; compartment*(R03460_k1*C00074*C03175 - R03460_k2*C00009*C01269);
    R03460_k1 = 1; R03460_k2 = 0.1;
  R01714: C01269 -> C00251 + C00009; compartment*(R01714_k1*C01269 - R01714_k2*C00251*C00009);
    R01714_k1 = 1; R01714_k2 = 0.1;
  R00729: C00082 + C00001 + C00007 -> C01179 + C00014 + C00027; compartment*(R00729_k1*C00082*C00001*C00007 - R00729_k2*C01179*C00014*C00027);
    R00729_k1 = 8.42; R00729_k2 = 2;
  R02521: C01179 + C00007 -> C00544 + C00011; compartment*(R02521_k1*C01179*C00007 - R02521_k2*C00544*C00011);
    R02521_k1 = 5; R02521_k2 = 1;
  R02519: C00544 + C00007 -> C01036; compartment*(R02519_k1*C00544*C00007 - R02519_k2*C01036);
    R02519_k1 = 50; R02519_k2 = 10;
  R03181: C01036 -> C01061; compartment*(R03181_k1*C01036 - R03181_k2*C01061);
    R03181_k1 = 2; R03181_k2 = 0.5;
  R01364: C01061 + C00001 -> C00164 + C00122; compartment*(R01364_k1*C01061*C00001 - R01364_k2*C00164*C00122);
    R01364_k1 = 10; R01364_k2 = 1;
  R00261: C00025 -> C00334 + C00011; compartment*(R00261_k1*C00025 - R00261_k2*C00334*C00011);
    R00261_k1 = 1.5; R00261_k2 = 0.5;
  R01648: C00334 + C00026 -> C00232 + C00025; compartment*(R01648_k1*C00334*C00026 - R01648_k2*C00232*C00025);
    R01648_k1 = 10; R01648_k2 = 1;
  R10178: C00334 + C00022 -> C00232 + C00041; compartment*(R10178_k1*C00334*C00022 - R10178_k2*C00232*C00041);
    R10178_k1 = 8; R10178_k2 = 2;
  R00713: C00232 + C00003 + C00001 -> C00042 + C00004 + C00080; compartment*(R00713_k1*C00232*C00003*C00001 - R00713_k2*C00042*C00004*C00080);
    R00713_k1 = 1; R00713_k2 = 0.1;
  R00714: C00232 + C00006 + C00001 -> C00042 + C00005 + C00080; compartment*(R00714_k1*C00232*C00006*C00001 - R00714_k2*C00042*C00005*C00080);
    R00714_k1 = 1; R00714_k2 = 0.1;
  R90001: C00004 + 3 C00008 -> C00003 + 3 C00002; compartment*(R90001_k1*C00004*C00008^3 - R90001_k2*C00003*C00002^3);
    R90001_k1 = 2; R90001_k2 = 0.5;
  R90002: C01352 + 2 C00008 -> C00016 + 2 C00002; compartment*(R90002_k1*C01352*C00008^2 - R90002_k2*C00016*C00002^2);
    R90002_k1 = 2; R90002_k2 = 0.5;
  I90001: INS => APS + Cbl + GRF2; compartment*I90001_k1*INS;
    I90001_k1 = 1;
  I90002: GRF2 => TC10 + Exo70 + CIP4_2; compartment*I90002_k1*GRF2;
    I90002_k1 = 1;
  I90003: Exo70 + CIP4_2 => C00267; compartment*I90003_k1*Exo70*CIP4_2;
    I90003_k1 = 1;

  // Unit definitions:
  unit volume = 1e-3 litre;
  unit substance = 1e-3 mole;
end
